def createScene(rootNode):

	rootNode.name = "RootNode"
	rootNode.dt = 0.01
	rootNode.gravity = [ 0., 0. ,0.]

	rootNode.addObject("DefaultAnimationLoop", name="animation_loop", computeBoundingBox=False) # Deactivating computeBoundingBox prevents to recompute the rendering boundingBox since particle moves to infinity

	rootNode.addObject("RequiredPlugin", pluginName=["Sofa.Component.StateContainer","Sofa.Component.Mass","Sofa.Component.MechanicalLoad",
												     "Sofa.Component.LinearSolver.Direct","Sofa.Component.ODESolver.Backward"])

	particleNode = rootNode.addChild("Particle", bbox=[0,0,0,1,1,1])   # bbox is only needed here to define a non-zero simulation space since the scene is a single rigid frame

    # Adding an integration scheme (ODE solver): here the backward Euler
	particleNode.addObject("EulerImplicitSolver", name="integration_scheme")
	# Adding a linear solver to solve the numerical system: here the direct solver using the LDLt decomposition
	particleNode.addObject("SparseLDLSolver", name="linear_solver")

	particleNode.addObject("MechanicalObject", template="Rigid3", name="particle_DOFs", position=[0,0,0,  0,0,0,1], showObject=True)

	particleNode.addObject("UniformMass", name="nodal_mass", totalMass=1)
	particleNode.addObject("ConstantForceField", name="nodal_force", totalForce=[1,0,0,0,0,0], indices=0)
